// SBML level 3 version 1

model SimpleExample02()

  // Compartments:
  compartment default_compartment = 1;

  // Species:
  species M in default_compartment = 0;
  species MM in default_compartment = 0;
  species S in default_compartment = 0;
  species SM in default_compartment = 0;
  species SMM in default_compartment = 0;

  // Parameters:
  k1 = 1;
  k2 = 1;
  k3 = 1;
  k4 = 1;
  Mtot = 100;
  Stot = 50;

  // Reactions:
  React1: M + M -> MM; k1*M*M;
  React2: MM -> M + M; k2*MM;
  React3: S + M -> SM; k3*S*M;
  React4: SM -> S + M; k4*SM;
  React5: S + MM -> SMM; k3*S*MM;
  React6: SMM -> S + MM; k4*SMM;
  React7: SM + M -> SMM; k1*SM*M;
  React8: SMM -> SM + M; k2*SMM;
end
