// SBML level 3 version 1

model SimpleExample03()

  // Compartments:
  compartment default_compartment = 1;

  // Species:
  species S in default_compartment = 50;
  species K in default_compartment = 0;
  species SK in default_compartment = 0;
  species A in default_compartment = 50;
  species SA in default_compartment = 0;
  species KA in default_compartment = 0;
  species pA in default_compartment = 0;

  // Parameters:
  k1 = 0.001;
  k2 = 0.01;
  k3 = 0.001;
  k4 = 0.01;
  ka = 0.001;
  kd = 0.01;
  kc = 0.01;
  Vmax = 1;
  Km = 10;
  Atot = 100;
  Stot = 100;
  Ktot = 100;

  // Reactions:
  React1: S + K -> SK; k1*S*K;
  React2: SK -> S + K; k2*SK;
  React3: S + A -> SA; A*k3*S;
  React4: SA -> S + A; k4*SA;
  React5: K + A -> KA; A*ka*K;
  React6: KA -> K + A; kd*KA;
  React7: KA -> K + pA; kc*KA;
  React8: pA -> A; Vmax*pA/(Km + pA);
end
